// SBML level 3 version 2

model grn_model()

  // Compartments:
  compartment default_compartment = 1;

  // Species:
  species GeneA in default_compartment = 10;
  species GeneB in default_compartment = 0;
  species GeneC in default_compartment = 10;
  species GeneD in default_compartment = 0;

  // Parameters:
  n_GeneA_to_GeneB = 1;
  K_GeneA_to_GeneB = 1;
  beta_GeneA_to_GeneB = 1;
  n_GeneB_to_GeneD = 1;
  K_GeneB_to_GeneD = 1;
  beta_GeneB_to_GeneD = 1;
  n_GeneC_to_GeneB = 1;
  beta_GeneC_to_GeneB = 1;
  K_GeneC_to_GeneB = 1;

  // Reactions:
  J_GeneA_to_GeneB: GeneA => GeneB; 1*GeneA^n_GeneA_to_GeneB/(K_GeneA_to_GeneB^n_GeneA_to_GeneB + GeneA^n_GeneA_to_GeneB);
  J_GeneB_to_GeneD: GeneB => GeneD; 1*GeneB^n_GeneB_to_GeneD/(K_GeneB_to_GeneD^n_GeneB_to_GeneD + GeneB^n_GeneB_to_GeneD);
  J_GeneC_to_GeneB: GeneC => GeneB; 1/(1 + GeneC^n_GeneC_to_GeneB/1);
end
